Aircraft
#Mach
0.0
#IYsym   IZsym   Zsym
0       0       0.0
#Sref    Cref    Bref
1.3 0.5 2.4
#Xref    Yref    Zref
0.5 0.0 0.0
#====================================================================
SURFACE
Wing
#Nchordwise  Cspace   Nspanwise   Sspace
8            1.0       12         1.0
#
YDUPLICATE
0.0
#
TRANSLATE
0.4 0.0 0.0
#-------------------------------------------------------------
SECTION
#Xle    Yle    Zle     Chord   Ainc  Nspanwise  Sspace
0.0 0.0 0.0 0.5 0.0 0.0 0.0
AFILE
Airfoils\NACA2412.dat
#-------------------------------------------------------------
SECTION
#Xle    Yle    Zle     Chord   Ainc  Nspanwise  Sspace
0.0 1.2 0.0 0.5 0.0 0.0 0.0
AFILE
Airfoils\NACA2412.dat

#====================================================================
SURFACE
HT
#Nchordwise  Cspace   Nspanwise   Sspace
8            1.0       12         1.0
#
YDUPLICATE
0.0
#
TRANSLATE
1.1 0.0 0.0
#-------------------------------------------------------------
SECTION
#Xle    Yle    Zle     Chord   Ainc  Nspanwise  Sspace
0.0 0.0 0.0 0.5 0.0 0.0 0.0
AFILE
Airfoils\NACA0012.dat
#-------------------------------------------------------------
SECTION
#Xle    Yle    Zle     Chord   Ainc  Nspanwise  Sspace
0.0 0.7 0.0 0.5 0.0 0.0 0.0
AFILE
Airfoils\NACA0012.dat
#====================================================================
SURFACE
VT
#Nchordwise  Cspace   Nspanwise   Sspace
8            1.0       12         1.0
#
TRANSLATE
1.1 0.0 0.0
#-------------------------------------------------------------
SECTION
#Xle    Yle    Zle     Chord   Ainc  Nspanwise  Sspace
0.0 0.0 0.0 0.6 0.0 0.0 0.0
AFILE
Airfoils\NACA0012.dat
#-------------------------------------------------------------
SECTION
#Xle    Yle    Zle     Chord   Ainc  Nspanwise  Sspace
0.2 0.0 0.2 0.3 0.0 0.0 0.0
AFILE
Airfoils\NACA0012.dat
